<Lems>

    <!--

        This LEMS file has been automatically generated using PyNeuroML v0.5.13 (libNeuroML v0.2.56)

     -->

    <!-- Specify which component to run -->
    <Target component="SimExample10" reportFile="report.SimExample10.txt"/>

    <!-- Include core NeuroML2 ComponentType definitions -->
    <Include file="Cells.xml"/>
    <Include file="Networks.xml"/>
    <Include file="Simulation.xml"/>

    <Include file="PyNN.xml"/>
    <Include file="Example10_Lorenz.net.nml"/>
    <Include file="Example10_Lorenz__lems.xml"/>

    <Simulation id="SimExample10" length="10000.0ms" step="1.0ms" target="Example10_Lorenz" seed="5678">  <!-- Note seed: ensures same random numbers used every run -->

        <Display id="lorenzPop_0_x" title="Plots of lorenzPop_0_x" timeScale="1ms" xmin="-1000.0" xmax="11000.0" ymin="-1" ymax="1">
            <Line id="lorenzPop_0__x" quantity="lorenzPop[0]/x" scale="1" color="#d54f33" timeScale="1ms"/>
        </Display>

        <Display id="lorenzPop_0_y" title="Plots of lorenzPop_0_y" timeScale="1ms" xmin="-1000.0" xmax="11000.0" ymin="-1" ymax="1">
            <Line id="lorenzPop_0__y" quantity="lorenzPop[0]/y" scale="1" color="#0534e4" timeScale="1ms"/>
        </Display>

        <Display id="lorenzPop_0_z" title="Plots of lorenzPop_0_z" timeScale="1ms" xmin="-1000.0" xmax="11000.0" ymin="-1" ymax="1">
            <Line id="lorenzPop_0__z" quantity="lorenzPop[0]/z" scale="1" color="#98e752" timeScale="1ms"/>
        </Display>

        <OutputFile id="lorenzPop_0_x_dat" fileName="lorenzPop_0.x.dat">
            <OutputColumn id="lorenzPop_0__x" quantity="lorenzPop[0]/x"/>
        </OutputFile>

        <OutputFile id="lorenzPop_0_y_dat" fileName="lorenzPop_0.y.dat">
            <OutputColumn id="lorenzPop_0__y" quantity="lorenzPop[0]/y"/>
        </OutputFile>

        <OutputFile id="lorenzPop_0_z_dat" fileName="lorenzPop_0.z.dat">
            <OutputColumn id="lorenzPop_0__z" quantity="lorenzPop[0]/z"/>
        </OutputFile>

    </Simulation>

</Lems>
