<Lems>

    <!--

        This LEMS file has been automatically generated using PyNeuroML v0.5.13 (libNeuroML v0.2.56)

     -->

    <!-- Specify which component to run -->
    <Target component="SimExample11" reportFile="report.SimExample11.txt"/>

    <!-- Include core NeuroML2 ComponentType definitions -->
    <Include file="Cells.xml"/>
    <Include file="Networks.xml"/>
    <Include file="Simulation.xml"/>

    <Include file="PyNN.xml"/>
    <Include file="Example11_Synapses.net.nml"/>

    <Simulation id="SimExample11" length="1000.0ms" step="0.01ms" target="Example11_Synapses" seed="5678">  <!-- Note seed: ensures same random numbers used every run -->

        <Display id="pop0_v" title="Plots of pop0_v" timeScale="1ms" xmin="-100.0" xmax="1100.0" ymin="-80" ymax="40">
            <Line id="pop0_0_iafCell0_v" quantity="pop0/0/iafCell0/v" scale="1mV" color="#d54f33" timeScale="1ms"/>
        </Display>

        <Display id="pop1_0_synapses:ampa:0/g" title="Plots of pop1_0_synapses:ampa:0/g" timeScale="1ms" xmin="-100.0" xmax="1100.0" ymin="-1" ymax="1">
            <Line id="pop1_0_iafCell0_synapses:ampa:0_g" quantity="pop1/0/iafCell0/synapses:ampa:0/g" scale="1" color="#0534e4" timeScale="1ms"/>
        </Display>

        <Display id="pop1_0_synapses:nmdaSyn:0/g" title="Plots of pop1_0_synapses:nmdaSyn:0/g" timeScale="1ms" xmin="-100.0" xmax="1100.0" ymin="-1" ymax="1">
            <Line id="pop1_0_iafCell0_synapses:nmdaSyn:0_g" quantity="pop1/0/iafCell0/synapses:nmdaSyn:0/g" scale="1" color="#98e752" timeScale="1ms"/>
        </Display>

        <Display id="pop1_v" title="Plots of pop1_v" timeScale="1ms" xmin="-100.0" xmax="1100.0" ymin="-80" ymax="40">
            <Line id="pop1_0_iafCell0_v" quantity="pop1/0/iafCell0/v" scale="1mV" color="#bca074" timeScale="1ms"/>
        </Display>

        <OutputFile id="SimExample11_pop0_v_dat" fileName="SimExample11.pop0.v.dat">
            <OutputColumn id="pop0_0_iafCell0_v" quantity="pop0/0/iafCell0/v"/>
        </OutputFile>

        <OutputFile id="SimExample11_pop1_v_dat" fileName="SimExample11.pop1.v.dat">
            <OutputColumn id="pop1_0_iafCell0_v" quantity="pop1/0/iafCell0/v"/>
        </OutputFile>

        <OutputFile id="pop1_0_synapses:ampa:0_g_dat" fileName="pop1_0.synapses:ampa:0_g.dat">
            <OutputColumn id="pop1_0_iafCell0_synapses:ampa:0_g" quantity="pop1/0/iafCell0/synapses:ampa:0/g"/>
        </OutputFile>

        <OutputFile id="pop1_0_synapses:nmdaSyn:0_g_dat" fileName="pop1_0.synapses:nmdaSyn:0_g.dat">
            <OutputColumn id="pop1_0_iafCell0_synapses:nmdaSyn:0_g" quantity="pop1/0/iafCell0/synapses:nmdaSyn:0/g"/>
        </OutputFile>

        <EventOutputFile id="SimExample11_pop0_spikes" fileName="SimExample11.pop0.spikes" format="ID_TIME">
            <EventSelection id="0" select="pop0/0/iafCell0" eventPort="spike"/>
        </EventOutputFile>

    </Simulation>

</Lems>
