<Lems>

    <!--

        This LEMS file has been automatically generated using PyNeuroML v0.5.13 (libNeuroML v0.2.56)

     -->

    <!-- Specify which component to run -->
    <Target component="SimExample7" reportFile="report.SimExample7.txt"/>

    <!-- Include core NeuroML2 ComponentType definitions -->
    <Include file="Cells.xml"/>
    <Include file="Networks.xml"/>
    <Include file="Simulation.xml"/>

    <Include file="PyNN.xml"/>
    <Include file="Example7_Brunel2000.net.nml"/>

    <Simulation id="SimExample7" length="1000.0ms" step="0.025ms" target="Example7_Brunel2000" seed="123">  <!-- Note seed: ensures same random numbers used every run -->

        <Display id="Epop_v" title="Plots of Epop_v" timeScale="1ms" xmin="-100.0" xmax="1100.0" ymin="-80" ymax="40">
            <Line id="Epop_0_ifcell_v" quantity="Epop/0/ifcell/v" scale="1mV" color="#d54f33" timeScale="1ms"/>
            <Line id="Epop_1_ifcell_v" quantity="Epop/1/ifcell/v" scale="1mV" color="#0534e4" timeScale="1ms"/>
        </Display>

        <Display id="Ipop_v" title="Plots of Ipop_v" timeScale="1ms" xmin="-100.0" xmax="1100.0" ymin="-80" ymax="40">
            <Line id="Ipop_0_ifcell_v" quantity="Ipop/0/ifcell/v" scale="1mV" color="#98e752" timeScale="1ms"/>
            <Line id="Ipop_1_ifcell_v" quantity="Ipop/1/ifcell/v" scale="1mV" color="#bca074" timeScale="1ms"/>
        </Display>

        <OutputFile id="SimExample7_Epop_v_dat" fileName="SimExample7.Epop.v.dat">
            <OutputColumn id="Epop_0_ifcell_v" quantity="Epop/0/ifcell/v"/>
            <OutputColumn id="Epop_1_ifcell_v" quantity="Epop/1/ifcell/v"/>
        </OutputFile>

        <OutputFile id="SimExample7_Ipop_v_dat" fileName="SimExample7.Ipop.v.dat">
            <OutputColumn id="Ipop_0_ifcell_v" quantity="Ipop/0/ifcell/v"/>
            <OutputColumn id="Ipop_1_ifcell_v" quantity="Ipop/1/ifcell/v"/>
        </OutputFile>

        <EventOutputFile id="SimExample7_Epop_spikes" fileName="SimExample7.Epop.spikes" format="ID_TIME">
            <EventSelection id="0" select="Epop/0/ifcell" eventPort="spike"/>
            <EventSelection id="1" select="Epop/1/ifcell" eventPort="spike"/>
            <EventSelection id="2" select="Epop/2/ifcell" eventPort="spike"/>
            <EventSelection id="3" select="Epop/3/ifcell" eventPort="spike"/>
            <EventSelection id="4" select="Epop/4/ifcell" eventPort="spike"/>
            <EventSelection id="5" select="Epop/5/ifcell" eventPort="spike"/>
            <EventSelection id="6" select="Epop/6/ifcell" eventPort="spike"/>
            <EventSelection id="7" select="Epop/7/ifcell" eventPort="spike"/>
            <EventSelection id="8" select="Epop/8/ifcell" eventPort="spike"/>
            <EventSelection id="9" select="Epop/9/ifcell" eventPort="spike"/>
            <EventSelection id="10" select="Epop/10/ifcell" eventPort="spike"/>
            <EventSelection id="11" select="Epop/11/ifcell" eventPort="spike"/>
            <EventSelection id="12" select="Epop/12/ifcell" eventPort="spike"/>
            <EventSelection id="13" select="Epop/13/ifcell" eventPort="spike"/>
            <EventSelection id="14" select="Epop/14/ifcell" eventPort="spike"/>
            <EventSelection id="15" select="Epop/15/ifcell" eventPort="spike"/>
            <EventSelection id="16" select="Epop/16/ifcell" eventPort="spike"/>
            <EventSelection id="17" select="Epop/17/ifcell" eventPort="spike"/>
            <EventSelection id="18" select="Epop/18/ifcell" eventPort="spike"/>
            <EventSelection id="19" select="Epop/19/ifcell" eventPort="spike"/>
        </EventOutputFile>

        <EventOutputFile id="SimExample7_Ipop_spikes" fileName="SimExample7.Ipop.spikes" format="ID_TIME">
            <EventSelection id="0" select="Ipop/0/ifcell" eventPort="spike"/>
            <EventSelection id="1" select="Ipop/1/ifcell" eventPort="spike"/>
            <EventSelection id="2" select="Ipop/2/ifcell" eventPort="spike"/>
            <EventSelection id="3" select="Ipop/3/ifcell" eventPort="spike"/>
            <EventSelection id="4" select="Ipop/4/ifcell" eventPort="spike"/>
        </EventOutputFile>

        <EventOutputFile id="SimExample7_expoisson_spikes" fileName="SimExample7.expoisson.spikes" format="ID_TIME">
            <EventSelection id="0" select="expoisson/0/poisson_input" eventPort="spike"/>
            <EventSelection id="1" select="expoisson/1/poisson_input" eventPort="spike"/>
            <EventSelection id="2" select="expoisson/2/poisson_input" eventPort="spike"/>
            <EventSelection id="3" select="expoisson/3/poisson_input" eventPort="spike"/>
            <EventSelection id="4" select="expoisson/4/poisson_input" eventPort="spike"/>
        </EventOutputFile>

        <EventOutputFile id="SimExample7_inpoisson_spikes" fileName="SimExample7.inpoisson.spikes" format="ID_TIME">
            <EventSelection id="0" select="inpoisson/0/poisson_input" eventPort="spike"/>
            <EventSelection id="1" select="inpoisson/1/poisson_input" eventPort="spike"/>
            <EventSelection id="2" select="inpoisson/2/poisson_input" eventPort="spike"/>
            <EventSelection id="3" select="inpoisson/3/poisson_input" eventPort="spike"/>
            <EventSelection id="4" select="inpoisson/4/poisson_input" eventPort="spike"/>
        </EventOutputFile>

    </Simulation>

</Lems>
