# OpenSim document version 30000
InverseKinematicsTool subject01:
  results_directory: ./
  constraint_weight: Inf
  accuracy: 1e-5
  time_range: 0.5 2.5
  report_errors: true
  timeScale: 20
  order: 4
  sdProcess: 15
  sdMeas: 0.03
  use_visualizer: true
  output_motion_file: subject01_walk1_ks.mot
  report_marker_locations: true
  IKTaskSet:
    IKMarkerTask LASI: apply=true weight=100
    IKMarkerTask RASI: apply=true weight=100
    IKMarkerTask LPSI: apply=true weight=100
    IKMarkerTask RPSI: apply=true weight=100
    IKMarkerTask RTHI: apply=true weight=100
    IKMarkerTask RKNE: apply=true weight=100
    IKMarkerTask RTIB: apply=true weight=100
    IKMarkerTask RANK: apply=true weight=100
    IKMarkerTask RHEE: apply=true weight=100
    IKMarkerTask RTOE: apply=true weight=100
    IKMarkerTask LTHI: apply=true weight=100
    IKMarkerTask LKNE: apply=true weight=100
    IKMarkerTask LTIB: apply=true weight=100
    IKMarkerTask LANK: apply=true weight=100
    IKMarkerTask LHEE: apply=true weight=100
    IKMarkerTask LTOE: apply=true weight=100
    IKMarkerTask LTHAP: apply=true weight=100
    IKMarkerTask LTHAD: apply=true weight=100
    IKMarkerTask LTIAP: apply=true weight=100
    IKMarkerTask LTIAD: apply=true weight=100
    IKMarkerTask RTHAP: apply=true weight=100
    IKMarkerTask RTHAD: apply=true weight=100
    IKMarkerTask RTIAP: apply=true weight=100
    IKMarkerTask RTIAD: apply=true weight=100
    IKMarkerTask LTHLD: apply=true weight=0
    IKMarkerTask LPAT: apply=false weight=0
    IKMarkerTask RTHLD: apply=true weight=0
    IKMarkerTask RPAT: apply=false weight=0
